*Heading
** Job name: cube Model name: Model-1
** Generated by: Abaqus/CAE Learning Edition 2025
*Preprint, echo=NO, model=NO, history=NO, contact=NO
**
** PARTS
**
*Part, name=cube
*Node
      1,         100.,         100.,         100.
      2,         100.,           0.,         100.
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*Element, type=C3D4
   1, 297, 298, 299, 300
   2, 301, 302, 303, 304
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*Nset, nset=Set-1, generate
   1,  591,    1
*Elset, elset=Set-1, generate
    1,  2546,     1
** Section: steel
*Solid Section, elset=Set-1, material=steel
,
*End Part
**
**
** ASSEMBLY
**
*Assembly, name=Assembly
**
*Instance, name=cube-1, part=cube
*End Instance
**
*Nset, nset=Set-1, instance=cube-1
   3,   4,   6,   7,  21,  22
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*Elset, elset=Set-1, instance=cube-1
   28,  162,  396,  404,  470,  488
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*Nset, nset=Set-2, instance=cube-1
   1,   2,   5,   8,   9,  10
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*Elset, elset=Set-2, instance=cube-1
   95,  219,  240,  323,  390,  394
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*Nset, nset=Set-3, instance=cube-1
   1,   2,   5,   8,   9,  10
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*Elset, elset=Set-3, instance=cube-1
   95,  219,  240,  323,  390,  394
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*Elset, elset=_Surf-1_S3, internal, instance=cube-1
   95,  219,  240,  390,  400,  694
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*Elset, elset=_Surf-1_S1, internal, instance=cube-1
 323, 394
*Elset, elset=_Surf-1_S2, internal, instance=cube-1
  468, 1056, 2239
*Elset, elset=_Surf-1_S4, internal, instance=cube-1
 2222, 2254, 2363
*Surface, type=ELEMENT, name=Surf-1
_Surf-1_S3, S3
_Surf-1_S1, S1
_Surf-1_S2, S2
_Surf-1_S4, S4
*End Assembly
**
** MATERIALS
**
*Material, name=steel
*Elastic
210000., 0.3
*Plastic
250.,   0.
500., 0.25
**
** BOUNDARY CONDITIONS
**
** Name: bottom Type: Displacement/Rotation
*Boundary
Set-1, 1, 1
Set-1, 2, 2
Set-1, 3, 3
** ----------------------------------------------------------------
**
** STEP: Step-1
**
*Step, name=Step-1, nlgeom=NO
*Static
1., 1., 1e-05, 1.
**
** BOUNDARY CONDITIONS
**
** Name: top Type: Displacement/Rotation
*Boundary
Set-3, 1, 1
Set-3, 2, 2, 0.1
Set-3, 3, 3
**
** OUTPUT REQUESTS
**
*Restart, write, frequency=0
**
** FIELD OUTPUT: F-Output-1
**
*Output, field, variable=PRESELECT
**
** HISTORY OUTPUT: H-Output-1
**
*Output, history, variable=PRESELECT
*End Step
