*Heading
** Job name: curvedpipe Model name: Model-1
** Generated by: Abaqus/CAE Learning Edition 2025
*Preprint, echo=NO, model=NO, history=NO, contact=NO
**
** PARTS
**
*Part, name=curvedpipe
*End Part
**
**
** ASSEMBLY
**
*Assembly, name=Assembly
**
*Instance, name=curvedpipe-1, part=curvedpipe
*Node
      1,          25.,           0.,           0.
      2,         100.,           0.,          75.
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*Element, type=C3D4
   1, 760, 308, 761,  35
   2, 760, 762, 102, 763
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*Nset, nset=Set-1, generate
   1,  976,    1
*Elset, elset=Set-1, generate
    1,  3537,     1
** Section: curvedpipe
*Solid Section, elset=Set-1, material=steel
,
*End Instance
**
*Nset, nset=Set-4, instance=curvedpipe-1
   1,   3,   5,   6,   7,   8
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*Elset, elset=Set-4, instance=curvedpipe-1
    7,    8,   10,   21,   22,   27
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*Elset, elset=_Surf-1_S3, internal, instance=curvedpipe-1
   14,   19,   47,   48,  161,  238
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*Elset, elset=_Surf-1_S4, internal, instance=curvedpipe-1
  483,  783, 1360, 1440, 1531, 2476, 3501
*Elset, elset=_Surf-1_S2, internal, instance=curvedpipe-1
 1179, 1346, 1439, 1968, 2213, 2438, 3397, 3405, 3491
*Elset, elset=_Surf-1_S1, internal, instance=curvedpipe-1
 2427,
*Surface, type=ELEMENT, name=Surf-1
_Surf-1_S3, S3
_Surf-1_S4, S4
_Surf-1_S2, S2
_Surf-1_S1, S1
*End Assembly
**
** MATERIALS
**
*Material, name=steel
*Elastic
210000., 0.3
*Plastic
250.,   0.
500., 0.25
** ----------------------------------------------------------------
**
** STEP: Step-1
**
*Step, name=Step-1, nlgeom=NO
*Static
1., 1., 1e-05, 1.
**
** BOUNDARY CONDITIONS
**
** Name: fix Type: Displacement/Rotation
*Boundary
Set-4, 1, 1
Set-4, 2, 2
Set-4, 3, 3
**
** LOADS
**
** Name: Load-1   Type: Surface traction
*Dsload, constant resultant=YES
Surf-1, TRVEC, 0.7958, -1., 0., 0.
**
** OUTPUT REQUESTS
**
*Restart, write, frequency=0
**
** FIELD OUTPUT: F-Output-1
**
*Output, field, variable=PRESELECT
**
** HISTORY OUTPUT: H-Output-1
**
*Output, history, variable=PRESELECT
*End Step
