*Heading
** Job name: shelf Model name: Model-1
** Generated by: Abaqus/CAE Learning Edition 2025
*Preprint, echo=NO, model=NO, history=NO, contact=NO
**
** PARTS
**
*Part, name=shelf
*Node
      1,          60.,          20.,          10.
      2,          60.,          20.,           0.
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*Element, type=C3D4
  1, 473, 474, 475, 476
  2, 477, 474, 478, 479
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*Nset, nset=Set-1, generate
   1,  807,    1
*Elset, elset=Set-1, generate
    1,  3310,     1
** Section: shelf
*Solid Section, elset=Set-1, material=Material-1
,
*End Part
**
**
** ASSEMBLY
**
*Assembly, name=Assembly
**
*Instance, name=shelf-1, part=shelf
*End Instance
**
*Nset, nset=Set-1, instance=shelf-1
   9,  10,  11,  12,  75,  76
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*Elset, elset=Set-1, instance=shelf-1
  999, 1162, 1205, 1299, 1390, 1401
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*Elset, elset=_Surf-1_S3, internal, instance=shelf-1
 2513, 2545, 2551, 2587, 2596, 2597
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*Elset, elset=_Surf-1_S4, internal, instance=shelf-1
 2981,
*Elset, elset=_Surf-1_S1, internal, instance=shelf-1
 3015, 3041
*Surface, type=ELEMENT, name=Surf-1
_Surf-1_S3, S3
_Surf-1_S4, S4
_Surf-1_S1, S1
*End Assembly
**
** MATERIALS
**
*Material, name=Material-1
*Elastic
210000., 0.3
*Plastic
250.,   0.
500., 0.25
** ----------------------------------------------------------------
**
** STEP: Step-1
**
*Step, name=Step-1, nlgeom=NO
*Static
1., 1., 1e-05, 1.
**
** BOUNDARY CONDITIONS
**
** Name: fix Type: Displacement/Rotation
*Boundary
Set-1, 1, 1
Set-1, 2, 2
Set-1, 3, 3
**
** LOADS
**
** Name: Load-1   Type: Surface traction
*Dsload
Surf-1, TRVEC, 100., 0., 0., -1.
**
** OUTPUT REQUESTS
**
*Restart, write, frequency=0
**
** FIELD OUTPUT: F-Output-1
**
*Output, field, variable=PRESELECT
**
** HISTORY OUTPUT: H-Output-1
**
*Output, history, variable=PRESELECT
*End Step
